# Car stability by braking - calculation
# Base data
m_. := 1200 kg
v := 60*km/hr
r := 38 m
r_I := 1.5 m
I := 1/2*m_.*r_I^2
I = 1350 kg*m^2
# Geometric data
l_. := 4 m
l_1 := 1.5 m
l_2 := l_. - l_1
w_. := 1.5 m
w_1 := 0.5 m
w_2 := w_. - w_1
h_. := 1.5 m
h_1 := 0.5 m
# Other data
g := 9.81*m/s^2
# Friction function by vertical force
μ_A := 1.2
μ_B := 0.3
μ_C := 0.3
μ_D := 10000
μ(F_y) := μ_A - μ_C/(F_y/(N*μ_D) + μ_B)
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# Angular velocity
ω := v/r
ω = 0.438596 1/s
# Gravity
G_. := m_.*g
G_. = 11.772 kN
# Centripetal force
F_cp := m_.*v^2/r
F_cp = 8771.93 N
# Body direction
α := 120 °
α = 2.0944 rad
d_b := pol2xy(1, α)
d_b = [-0.5; 0.866025]
# Speed direction
v = 16.6667 m/s
α_v := 150 °
α_v = 2.61799
d_v := pol2xy(1, α_v)
d_v = [-0.866025; 0.5]
# Speed vector
v_v := v*d_v
v_v = [-14.4338; 8.33333] m/s
# Speed in body direction
v_α := v*d_b*d_v
v_α = 14.4338 m/s
# Check
v_α.t := v*(cos(α)*cos(α_v) + sin(α)*sin(α_v))
v_α.t = 14.4338 m/s
v_α.t2 := cos(α)*v_v[0] + sin(α)*v_v[1]
v_α.t2 = 14.4338 m/s
